// COMSOL Multiphysics 5.5.0.359 model "Effect of surface roughness on heat transfer.mph"
// Outline of the model tree

Parameters
  L = 100  // Length of Cavity
  H = 80  // Height of Cavity
  U = 1  // Velocity of top sliding wall
  T_max = 400  // Rough wall temperature
  T_min = 293  // Top wall temperature
  T = 300  // room temperature
  k_Al2O3 = 40
  rho_Al2O3 = 3970
  Cp_Al2O3 = 765
  mu_Al2O3 = 1
  Beta = 8.5*10^(-6)
  rho_Water = 997.1
  k_water = 0.613
  mu_water = 1.002*10^(-3)
  X0 = -5
  Y0 = 0

Selections
  sel1: Explicit on boundaries 1-4
  sel2: Explicit on boundaries 1-4

Geometry
  geom1 "Geometry 1" (2D, length unit m)
    pc1: ParametricCurve | parmin = -5; parmax = L; coord = {s, 4*((sqrt(sin(s/2)^2)+sin(s/2))/2)}; maxknots = 10000
    pol1: Polygon | source = table; table = {{X0, Y0}, {X0, H}}
    pol2: Polygon | source = table; table = {{X0, H}, {L, H}}
    pol3: Polygon | source = table; table = {{L, H}, {L, Y0}}
    uni1: Union | input = pc1, pol1, pol2, pol3
    csol1: ConvertToSolid | input = uni1
    fin: Finalize "Form Union"

Materials
  mat1: Common "94% Al2O3 [solid]" on no domains
    def "Basic"
      thermalexpansioncoefficient = (alpha_Al2O3(T[1/K])[1/K]+(Tempref-293[K])*if(abs(T-Tempref)>1e-3,(alpha(T[1/K])[1/K]-alpha(Tempref[1/K])[1/K])/(T-Tempref),d(alpha(T[1/K])[1/K],T)))/(1+alpha(Tempref[1/K])[1/K]*(Tempref-293[K]))
      density = rho_Al2O3
      thermalconductivity = k_Al2O3
      heatcapacity = Cp_Al2O3
      dynamicviscosity = mu_Al2O3
      alpha: Piecewise | arg = T; pieces = {293.0, 1473.0, 3.944437E-6+6.806282E-9*T^1-3.601049E-12*T^2+7.542153E-16*T^3}
      rho: Piecewise | arg = T; pieces = {293.0, 1473.0, 3756.162-0.04067051*T^1-5.069478E-5*T^2+1.338025E-8*T^3}
    ThermalExpansion
      alphatan = Beta
      dL = (dL(T[1/K])-dL(Tempref[1/K]))/(1+dL(Tempref[1/K]))
      dLIso = (dL(T[1/K])-dL(Tempref[1/K]))/(1+dL(Tempref[1/K]))
      dL: Piecewise | arg = T; pieces = {293.0, 1473.0, -0.00115572771+1.950247E-6*T^1+7.861281E-9*T^2-3.821941E-12*T^3+7.541879E-16*T^4}
    Enu "Young's modulus and Poisson's ratio"
      youngsmodulus = E(T[1/K])[Pa]
      poissonsratio = nu(T[1/K])
      E: Piecewise | arg = T; pieces = {293.0, 1473.0, 3.346408E11+2.964659E8*T^1-1784113.0*T^2+2895.083*T^3-1.84636*T^4+3.98036E-4*T^5}
      nu: Piecewise | arg = T; pieces = {293.0, 1473.0, 0.2900487-0.001001581*T^1+4.341511E-6*T^2-6.751663E-9*T^3+4.390585E-12*T^4-1.008932E-15*T^5}
    KG "Bulk modulus and shear modulus"
      K = kappa(T[1/K])[Pa]
      G = mu(T[1/K])[Pa]
      mu: Piecewise | arg = T; pieces = {293.0, 1473.0, 1.308812E11+2.086485E8*T^1-1116413.0*T^2+1797.865*T^3-1.164412*T^4+2.600012E-4*T^5}
      kappa: Piecewise | arg = T; pieces = {293.0, 1473.0, 7.393585E10+6.732083E8*T^1-1049898.0*T^2+638.1434*T^3-0.1296441*T^4}
  mat2: Common "H2O (water) [liquid]" on no domains
    def "Basic"
      thermalconductivity = k_water
      thermalexpansioncoefficient = (alpha_liquid_2(T[1/K])[1/K]+(Tempref-293[K])*if(abs(T-Tempref)>1e-3,(alpha_liquid_2(T[1/K])[1/K]-alpha_liquid_2(Tempref[1/K])[1/K])/(T-Tempref),d(alpha_liquid_2(T[1/K])[1/K],T)))/(1+alpha_liquid_2(Tempref[1/K])[1/K]*(Tempref-293[K]))
      heatcapacity = C_liquid_2(T[1/K])[J/(kg*K)]
      HC = HC_liquid_2(T[1/K])[J/(mol*K)]
      VP = VP_liquid_2(T[1/K])[Pa]
      density = rho_Water
      TD = TD_liquid_2(T[1/K])[m^2/s]
      dynamicviscosity = mu_water
      SurfF = SurfF(T[1/K])[N/m]
      k_liquid_2: Piecewise | arg = T; pieces = {275.0, 370.0, -0.9003748+0.008387698*T^1-1.118205E-5*T^2}
      alpha_liquid_2: Piecewise
        arg = T
        pieces = 
          {273.0, 283.0, 0.01032507-7.62815E-5*T^1+1.412474E-7*T^2}
          {283.0, 373.0, -0.002464185+1.947611E-5*T^1-5.049672E-8*T^2+4.616995E-11*T^3}
      C_liquid_2: Piecewise | arg = T; pieces = {293.0, 373.0, 4035.84079+0.492312034*T^1}
      HC_liquid_2: Piecewise | arg = T; pieces = {293.0, 373.0, 72.6451184+0.00886161577*T^1}
      VP_liquid_2: Piecewise | arg = T; pieces = {280.0, 600.0, (exp((-2.00512183e+03/T-5.56570000e-01*log10(T)+9.89879000e+00-1.11169009e+07/T^3)*log(10.0)))*1.33320000e+02}
      rho_liquid_2: Piecewise
        arg = T
        pieces = 
          {273.0, 283.0, 972.7584+0.2084*T^1-4.0E-4*T^2}
          {283.0, 373.0, 345.28+5.749816*T^1-0.0157244*T^2+1.264375E-5*T^3}
      TD_liquid_2: Piecewise | arg = T; pieces = {273.0, 333.0, 8.04E-8+2.0E-10*T^1}
      eta_liquid_1: Piecewise
        arg = T
        pieces = 
          {265.0, 293.0, 5.948859-0.08236196*T^1+4.287142E-4*T^2-9.938045E-7*T^3+8.65316E-10*T^4}
          {293.0, 353.0, 0.410191-0.004753985*T^1+2.079795E-5*T^2-4.061698E-8*T^3+2.983925E-11*T^4}
          {353.0, 423.0, 0.03625638-3.265463E-4*T^1+1.127139E-6*T^2-1.75363E-9*T^3+1.033976E-12*T^4}
      SurfF: Piecewise
        arg = T
        pieces = 
          {274.0, 568.0, 0.07739832+2.071003E-4*T^1-1.23147E-6*T^2+2.344068E-9*T^3-3.033107E-12*T^4+1.758716E-15*T^5}
          {568.0, 647.0, -109.3735+0.9291756*T^1-0.003154159*T^2+5.351438E-6*T^3-4.539449E-9*T^4+1.540327E-12*T^5}
    ThermalExpansion
      alphatan = CTE_liquid_2(T[1/K])[1/K]
      dL = (dL_liquid_2(T[1/K])-dL_liquid_2(Tempref[1/K]))/(1+dL_liquid_2(Tempref[1/K]))
      alphatanIso = CTE_liquid_2(T[1/K])[1/K]
      dLIso = (dL_liquid_2(T[1/K])-dL_liquid_2(Tempref[1/K]))/(1+dL_liquid_2(Tempref[1/K]))
      dL_liquid_2: Piecewise
        arg = T
        pieces = 
          {273.0, 283.0, 0.008486158-6.947021E-5*T^1+1.333373E-7*T^2}
          {283.0, 373.0, 0.232446637-0.002030447*T^1+5.510259E-6*T^2-4.395999E-9*T^3}
      CTE_liquid_2: Piecewise
        arg = T
        pieces = 
          {273.0, 283.0, -6.947321E-5+2.666746E-7*T^1}
          {283.0, 293.0, -0.01363715+8.893977E-5*T^1-1.43925E-7*T^2}
          {293.0, 373.0, -0.00203045+1.102052E-5*T^1-1.3188E-8*T^2}
  mat3: Common "Material 3" on no domains

Physics
  ht: HeatTransferInFluids on all domains
    dependent variable T
    fluid1: FluidHeatTransferModel "Fluid 1" (default)
    init1: init "Initial Values 1" (default)
    ins1: ThermalInsulation (default)
    ins2: ThermalInsulation on boundaries 3
    temp1: TemperatureBoundary "Temperature 1" on boundaries 4 | T0 = T_max
  spf: LaminarFlow on all domains
    dependent variable u = {u, v, w}
    fp1: FluidProperties (default)
    init1: init "Initial Values 1" (default)
    wallbc1: WallBC "Wall 1" (default) | BoundaryCondition = NoSlip
    wallbc2: WallBC "Wall 2" on boundaries 1, 2 | uvw = U; SlidingWall = 1
    wallbc3: WallBC "Wall 3" on boundaries 3

Mesh
  mesh1 "Mesh 1" (physics-controlled)
    size: MeshSizeDefault | table = cfd; hauto = 4

Studies
  std1 "Study 1"
    stat: Stationary